// COMSOL Multiphysics 6.0.0.318 model "QR_5_test1.mph"
// Outline of the model tree

Parameters
  L = 0.52[m]  // Width of the diffuser
  Lw = 0.09[m]  // Width of one well
  Li = 0.01[m]  // Width in between wells
  H = 0.3[m]  // Height of the diffuser
  d1 = 0[m]  // Depth of well 1
  d2 = 0.068[m]  // Depth of well 2
  d3 = 0.272[m]  // Depth of well 3
  d4 = 0.272[m]  // Depth of well 4
  d5 = 0.068[m]  // Depth of well 5
  d6 = 0.000001[m]  // Depth of well 6
  r_air = 3  // Radius of the air domain (for single diffuser)
  r0 = 10[m]  // Evaluation distance
  Hair = 1[m]  // Height of the air domain
  Hpml = 0.2[m]  // Thickness of the PML
  c0 = 343[m/s]  // Speed of sound
  rho0 = 1.225[kg/m^3]  // Density
  f0 = 125[Hz]  // Frequency parameter
  f_min = 250 [Hz]
  f_max = 4000[Hz]
  df = 10[Hz]
  phi = 0 [rad]  // phase angle

Coordinate systems
  pml1: PML "Perfectly Matched Layer 1" on domains 1, 5 | ScalingType = Cylindrical

Geometry
  geom1 "Geometry 1" (2D, length unit m)
    c1: Circle | layername = PML; layer = 0.75; r = r_air; angle = 180
    r1: Rectangle (disabled) | pos = {-L/2+Li, -d1}; size = {Lw, d1}
    r2: Rectangle | pos = {-L/2+2*Li+Lw, -d2}; size = {Lw, d2}
    r3: Rectangle | pos = {-L/2+3*Li+2*Lw, -d3}; size = {Lw, d3}
    r4: Rectangle | pos = {-L/2+4*Li+3*Lw, -d4}; size = {Lw, d4}
    r5: Rectangle | pos = {-L/2+5*Li+4*Lw, -d5}; size = {Lw, d5}
    pt1: Point | p = {-L/2+Li, }
    fin: Finalize "Form Union"

Materials
  mat1: Common "Air" on all domains
    def "Basic"
      thermalexpansioncoefficient = alpha_p(pA,T)
      molarmass = 0.02897[kg/mol]
      bulkviscosity = muB(T)
      relpermeability = 1
      relpermittivity = 1
      dynamicviscosity = eta(T)
      ratioofspecificheat = 1.4
      electricconductivity = 0[S/m]
      heatcapacity = Cp(T)
      density = rho(pA,T)
      thermalconductivity = k(T)
      soundspeed = cs(T)
      eta: Piecewise | arg = T; pieces = {200.0, 1600.0, -8.38278E-7+8.35717342E-8*T^1-7.69429583E-11*T^2+4.6437266E-14*T^3-1.06585607E-17*T^4}; argunit = K; fununit = Pa*s
      Cp: Piecewise | arg = T; pieces = {200.0, 1600.0, 1047.63657-0.372589265*T^1+9.45304214E-4*T^2-6.02409443E-7*T^3+1.2858961E-10*T^4}; argunit = K; fununit = J/(kg*K)
      rho: Analytic | expr = pA*0.02897/R_const[K*mol/J]/T; args = {pA, T}; fununit = kg/m^3; argunit = {Pa, K}
      k: Piecewise | arg = T; pieces = {200.0, 1600.0, -0.00227583562+1.15480022E-4*T^1-7.90252856E-8*T^2+4.11702505E-11*T^3-7.43864331E-15*T^4}; argunit = K; fununit = W/(m*K)
      cs: Analytic | expr = sqrt(1.4*R_const[K*mol/J]/0.02897*T); args = T; fununit = m/s; argunit = K
      an1: Analytic | funcname = alpha_p; expr = -1/rho(pA,T)*d(rho(pA,T),T); args = {pA, T}; fununit = 1/K; argunit = {Pa, K}
      an2: Analytic "Analytic 2a" | funcname = muB; expr = 0.6*eta(T); args = T; fununit = Pa*s; argunit = K
    RefractiveIndex
      n = 1
      ki = 0
    NonlinearModel
      BA = (def.gamma+1)/2
    idealGas
      Rs = R_const/Mn
      heatcapacity = Cp(T)
      ratioofspecificheat = 1.4
      molarmass = 0.02897
      Cp: Piecewise | arg = T; pieces = {200.0, 1600.0, 1047.63657-0.372589265*T^1+9.45304214E-4*T^2-6.02409443E-7*T^3+1.2858961E-10*T^4}; argunit = K; fununit = J/(kg*K)

Physics
  acpr: PressureAcoustics "Pressure Acoustics, Frequency Domain" on all domains
    dependent variable p
    fpam1: FrequencyPressureAcousticsModel "Pressure Acoustics 1" (default)
    shb1: SoundHard "Sound Hard Boundary (Wall) 1" (default)
    init1: init "Initial Values 1" (default)
    bpf1: BackgroundPressureField on domains 1-7 | p = p_inc; dir = {0, -1, 0}; phi = phi; pamp = 1; c_mat = from_mat
    imp1: Impedance on boundaries 2, 25

Mesh
  mesh1 "Mesh 1" (physics-controlled)

Studies
  std1 "Study 1"
    freq: Frequency "Frequency Domain" | plist = range(f_min,df,f_max)

Solver configurations
  sol1 "Solution 1" (study std1)
    v1: Variables "Dependent Variables 1"
    s1: Stationary "Stationary Solver 1"
      dDef: Direct
      p1: Parametric | pname = freq; plistarr = range(f_min,df,f_max); punit = Hz; pcontinuationmode = no
      fc1: FullyCoupled

Datasets
  dset1: Solution | solution = sol1